// ----------------------------------------------------------------------------------------------------------------
// BodyPartSetup - generic handling
// ----------------------------------------------------------------------------------------------------------------


// Setup default BM_LEG_MORPHOLOGY and BM_LEG_DATASET for the TLEM models
#ifndef BM_LEG_DATASET
  #if BM_LEG_MODEL == _LEG_MODEL_TLEM2_
  #define BM_LEG_DATASET "TLEM2.0"
  #endif
#endif

#ifndef BM_LEG_DATASET
  #if BM_LEG_MODEL == _LEG_MODEL_TLEM1_
  #define BM_LEG_DATASET "TLEM1.1"
  #endif
#endif

#ifdef BM_LEG_DATASET
  #ifndef BM_LEG_DATASET_PATH
    #path BM_LEG_DATASET_PATH "../../LegTLEM/" + BM_LEG_DATASET
    #include "<BM_LEG_DATASET_PATH>/PreprocDefaults.any"
  #endif
#endif

#ifndef BM_LEG_MORPHOLOGY
  #define BM_LEG_MORPHOLOGY 2
#endif
