AnyFolder Pelvis = {
  AnyVar Mass = .Trunk_ModelParameters.PelvisMass; //Winter et al.

  #if (!(RIGHT_LEG_TD | LEFT_LEG_TD | RIGHT_LEG | LEFT_LEG))
    AnyVar Width = .Trunk_ModelParameters.PelvisWidth;
    AnyVar Depth = .Trunk_ModelParameters.PelvisDepth;
  #else
    #if (RIGHT_LEG + LEFT_LEG) != 0
      AnyVar Width = 0.16;
    #else
      #if BM_LEG_TRUNK_INTERFACE == CONST_MORPH_TRUNK_TO_LEG
       AnyVar Width = .Leg_ModelParameters.Pelvis.Width;
       AnyVar Depth = .Leg_ModelParameters.Pelvis.Depth;
      #else
    AnyVar Width = .Trunk_ModelParameters.PelvisWidth;
    AnyVar Depth = .Trunk_ModelParameters.PelvisDepth;
      #endif
    #endif
  #endif
};

AnyFolder Trunk = {
  AnyVar Height = .Trunk_ModelParameters.TrunkHeight;
  AnyVar Mass = .Trunk_ModelParameters.TrunkMass;
};

AnyFolder Head ={
  AnyVar Height = .Trunk_ModelParameters.HeadHeight;
  AnyVar Mass = .Trunk_ModelParameters.HeadMass;
};

AnyFolder Lumbar = {
  AnyVar Mass = .Trunk_ModelParameters.LumbarMass;
};

AnyFolder CervicalSpine = {
  AnyVar Mass = .Trunk_ModelParameters.CervicalSpineMass;
};

AnyFolder HeadWithoutNeck = {
  AnyVar Mass = .Trunk_ModelParameters.HeadWithoutNeckMass;
  AnyVar Height =  .Trunk_ModelParameters.HeadWithoutNeckHeight;
};
