//define = [
//    {'BM_LEG_MODEL': '_LEG_MODEL_Leg_',
//     'BM_ARM_LEFT':'OFF','BM_ARM_RIGHT':'OFF'},
//    {'BM_LEG_MODEL': '_LEG_MODEL_TLEM_',
//     'BM_ARM_LEFT':'OFF','BM_ARM_RIGHT':'OFF'},
//    {'BM_LEG_MODEL': '_LEG_MODEL_TLEM2_',
//     'BM_ARM_LEFT':'OFF','BM_ARM_RIGHT':'OFF'},
//    {'BM_LEG_MODEL': 'OFF',
//     'BM_ARM_LEFT':'ON','BM_ARM_RIGHT':'ON'}
//]


#ifndef TEST_NAME

  #define BM_LEG_MODEL OFF
  #define BM_ARM_LEFT 1
  #define BM_ARM_RIGHT 1

  #endif

#include "../../Application/Validation/EvaluateJointStrength/EvaluateJointStrength.main.any"

Main =
{
  AnyOperation& RunTest = Main.RunApplication;
};
