AnyFolder JointAngleOutputs = {

  AnyOutputFile OutputFile_Trunk = {
    FileName = TEMP_PATH+"/"+ MOCAP_TEST_FILENAME_PREFIX + MOCAP_OUTPUT_FILENAME_PREFIX + Main.ModelSetup.TrialSpecificData.TrialFileName + "-euler-trunk.txt";
    SepSign = ",";
    SepSpaceAutoOnOff = Off;
    Header.TitleSectionOnOff = Off;
    Header.ConstSectionOnOff = Off;
    Header.ConstSectionSaveOptionsOnOff = Off;
    Header.VarSectionOnOff = Off;

    AnyVector PelvisPosX = ..BodyModel.Interface.Trunk.PelvisPosX.Pos;
    AnyVector PelvisPosY = ..BodyModel.Interface.Trunk.PelvisPosY.Pos;
    AnyVector PelvisPosZ = ..BodyModel.Interface.Trunk.PelvisPosZ.Pos;
    AnyVector PelvisRotX = ..BodyModel.Interface.Trunk.PelvisRotX.Pos;
    AnyVector PelvisRotY = ..BodyModel.Interface.Trunk.PelvisRotY.Pos;
    AnyVector PelvisRotZ = ..BodyModel.Interface.Trunk.PelvisRotZ.Pos;
    AnyVector PelvisThoraxExtension = ..BodyModel.Interface.Trunk.PelvisThoraxExtension.Pos;
    AnyVector PelvisThoraxLateralBending = ..BodyModel.Interface.Trunk.PelvisThoraxLateralBending.Pos;
    AnyVector PelvisThoraxRotation = ..BodyModel.Interface.Trunk.PelvisThoraxRotation.Pos;
    AnyVector SkullThoraxFlexion = ..BodyModel.Interface.Trunk.SkullThoraxFlexion.Pos;
    AnyVector SkullThoraxLateralBending = ..BodyModel.Interface.Trunk.SkullThoraxLateralBending.Pos;
    AnyVector SkullThoraxRotation = ..BodyModel.Interface.Trunk.SkullThoraxRotation.Pos;
  };


  #if BM_LEG_LEFT & (BM_LEG_MODEL == _LEG_MODEL_TLEM1_ |  BM_LEG_MODEL == _LEG_MODEL_TLEM2_)

  AnyOutputFile OutputFile_LeftLeg = {
    FileName = TEMP_PATH+"/"+ MOCAP_TEST_FILENAME_PREFIX + MOCAP_OUTPUT_FILENAME_PREFIX + Main.ModelSetup.TrialSpecificData.TrialFileName + "-euler-leftlegtd.txt";
    SepSign = ",";
    SepSpaceAutoOnOff = Off;
    Header.TitleSectionOnOff = Off;
    Header.ConstSectionOnOff = Off;
    Header.ConstSectionSaveOptionsOnOff = Off;
    Header.VarSectionOnOff = Off;


    AnyVector HipFlexion = ..BodyModel.Interface.Left.HipFlexion.Pos;
    AnyVector HipAbduction = ..BodyModel.Interface.Left.HipAbduction.Pos;
    AnyVector HipExternalRotation = ..BodyModel.Interface.Left.HipExternalRotation.Pos;
    AnyVector KneeFlexion = ..BodyModel.Interface.Left.KneeFlexion.Pos;
    AnyVector AnklePlantarFlexion = ..BodyModel.Interface.Left.AnklePlantarFlexion.Pos;
    AnyVector SubTalarEversion = ..BodyModel.Interface.Left.SubTalarEversion.Pos;
  };

  #endif


  #if BM_LEG_RIGHT & (BM_LEG_MODEL == _LEG_MODEL_TLEM1_ |  BM_LEG_MODEL == _LEG_MODEL_TLEM2_)
  AnyOutputFile OutputFile_RightLeg = {
    FileName = TEMP_PATH+"/"+ MOCAP_TEST_FILENAME_PREFIX + MOCAP_OUTPUT_FILENAME_PREFIX + Main.ModelSetup.TrialSpecificData.TrialFileName + "-euler-rightlegtd.txt";
    SepSign = ",";
    SepSpaceAutoOnOff = Off;
    Header.TitleSectionOnOff = Off;
    Header.ConstSectionOnOff = Off;
    Header.ConstSectionSaveOptionsOnOff = Off;
    Header.VarSectionOnOff = Off;

    AnyVector HipFlexion = ..BodyModel.Interface.Right.HipFlexion.Pos;
    AnyVector HipAbduction = ..BodyModel.Interface.Right.HipAbduction.Pos;
    AnyVector HipExternalRotation = ..BodyModel.Interface.Right.HipExternalRotation.Pos;
    AnyVector KneeFlexion = ..BodyModel.Interface.Right.KneeFlexion.Pos;
    AnyVector AnklePlantarFlexion = ..BodyModel.Interface.Right.AnklePlantarFlexion.Pos;
    AnyVector SubTalarEversion = ..BodyModel.Interface.Right.SubTalarEversion.Pos;
  };
  #endif


    #if BM_LEG_LEFT & (BM_LEG_MODEL == _LEG_MODEL_LEG_)
  AnyOutputFile OutputFile_LeftLeg = {
    FileName = TEMP_PATH+"/"+ MOCAP_TEST_FILENAME_PREFIX + MOCAP_OUTPUT_FILENAME_PREFIX + Main.ModelSetup.TrialSpecificData.TrialFileName + "-euler-leftleg.txt";
    SepSign = ",";
    SepSpaceAutoOnOff = Off;
    Header.TitleSectionOnOff = Off;
    Header.ConstSectionOnOff = Off;
    Header.ConstSectionSaveOptionsOnOff = Off;
    Header.VarSectionOnOff = Off;

    AnyVector HipFlexion = ..BodyModel.Interface.Left.HipFlexion.Pos;
    AnyVector HipAbduction = ..BodyModel.Interface.Left.HipAbduction.Pos;
    AnyVector HipExternalRotation = ..BodyModel.Interface.Left.HipExternalRotation.Pos;
    AnyVector KneeFlexion = ..BodyModel.Interface.Left.KneeFlexion.Pos;
    AnyVector AnklePlantarFlexion = ..BodyModel.Interface.Left.AnklePlantarFlexion.Pos;
    AnyVector AnkleEversion = ..BodyModel.Interface.Left.AnkleEversion.Pos;
  };
  #endif


  #if BM_LEG_RIGHT & (BM_LEG_MODEL == _LEG_MODEL_LEG_)
  AnyOutputFile OutputFile_RightLeg = {
    FileName = TEMP_PATH+"/"+ MOCAP_TEST_FILENAME_PREFIX + MOCAP_OUTPUT_FILENAME_PREFIX + Main.ModelSetup.TrialSpecificData.TrialFileName + "-euler-rightleg.txt";
    SepSign = ",";
    SepSpaceAutoOnOff = Off;
    Header.TitleSectionOnOff = Off;
    Header.ConstSectionOnOff = Off;
    Header.ConstSectionSaveOptionsOnOff = Off;
    Header.VarSectionOnOff = Off;

    AnyVector HipFlexion = ..BodyModel.Interface.Right.HipFlexion.Pos;
    AnyVector HipAbduction = ..BodyModel.Interface.Right.HipAbduction.Pos;
    AnyVector HipExternalRotation = ..BodyModel.Interface.Right.HipExternalRotation.Pos;
    AnyVector KneeFlexion = ..BodyModel.Interface.Right.KneeFlexion.Pos;
    AnyVector AnklePlantarFlexion = ..BodyModel.Interface.Right.AnklePlantarFlexion.Pos;
    AnyVector AnkleEversion = ..BodyModel.Interface.Right.AnkleEversion.Pos;
  };
  #endif


  #if BM_ARM_LEFT == ON

  AnyOutputFile OutputFile_LeftShoulder = {
    FileName = TEMP_PATH+"/"+ MOCAP_TEST_FILENAME_PREFIX +MOCAP_OUTPUT_FILENAME_PREFIX + Main.ModelSetup.TrialSpecificData.TrialFileName + "-euler-left_shoulder.txt";
    SepSign = ",";
    SepSpaceAutoOnOff = Off;
    Header.TitleSectionOnOff = Off;
    Header.ConstSectionOnOff = Off;
    Header.ConstSectionSaveOptionsOnOff = Off;
    Header.VarSectionOnOff = Off;

    AnyVector SternoClavicularProtraction =..BodyModel.Interface.Left.SternoClavicularProtraction.Pos;
    AnyVector ScapulaClavicularElevation=..BodyModel.Interface.Left.ScapulaThoraxElevation.Pos;
    AnyVector SternoClavicularAxialRotation=..BodyModel.Interface.Left.SternoClavicularAxialRotation.Pos;
  };

  AnyOutputFile OutputFile_LeftArm = {
    FileName = TEMP_PATH+"/"+ MOCAP_TEST_FILENAME_PREFIX +MOCAP_OUTPUT_FILENAME_PREFIX + Main.ModelSetup.TrialSpecificData.TrialFileName + "-euler-left_arm.txt";
    SepSign = ",";
    SepSpaceAutoOnOff = Off;
    Header.TitleSectionOnOff = Off;
    Header.ConstSectionOnOff = Off;
    Header.ConstSectionSaveOptionsOnOff = Off;
    Header.VarSectionOnOff = Off;

    AnyVector GlenohumeralFlexion = ..BodyModel.Interface.Left.GlenohumeralFlexion.Pos;
    AnyVector GlenohumeralExternalRotation = ..BodyModel.Interface.Left.GlenohumeralExternalRotation.Pos;
    AnyVector GlenohumeralAbduction = ..BodyModel.Interface.Left.GlenohumeralAbduction.Pos;
    AnyVector ElbowFlexion = ..BodyModel.Interface.Left.ElbowFlexion.Pos;
    AnyVector ElbowPronation = ..BodyModel.Interface.Left.ElbowPronation.Pos;
    AnyVector WristFlexion = ..BodyModel.Interface.Left.WristFlexion.Pos;
    AnyVector WristAbduction = ..BodyModel.Interface.Left.WristAbduction.Pos;
  };
  #endif


  #if BM_ARM_RIGHT == ON
    AnyOutputFile OutputFile_RightShoulder = {
    FileName = TEMP_PATH+"/"+ MOCAP_TEST_FILENAME_PREFIX + MOCAP_OUTPUT_FILENAME_PREFIX + Main.ModelSetup.TrialSpecificData.TrialFileName + "-euler-right_shoulder.txt";
    SepSign = ",";
    SepSpaceAutoOnOff = Off;
    Header.TitleSectionOnOff = Off;
    Header.ConstSectionOnOff = Off;
    Header.ConstSectionSaveOptionsOnOff = Off;
    Header.VarSectionOnOff = Off;

    AnyVector SternoClavicularProtraction=..BodyModel.Interface.Right.SternoClavicularProtraction.Pos;
    AnyVector ScapulaClavicularElevation=..BodyModel.Interface.Right.ScapulaThoraxElevation.Pos;
    AnyVector SternoClavicularAxialRotation=..BodyModel.Interface.Right.SternoClavicularAxialRotation.Pos;
  };

  AnyOutputFile OutputFile_RightArm = {
    FileName = TEMP_PATH+"/"+ MOCAP_TEST_FILENAME_PREFIX + MOCAP_OUTPUT_FILENAME_PREFIX + Main.ModelSetup.TrialSpecificData.TrialFileName + "-euler-right_arm.txt";
    SepSign = ",";
    SepSpaceAutoOnOff = Off;
    Header.TitleSectionOnOff = Off;
    Header.ConstSectionOnOff = Off;
    Header.ConstSectionSaveOptionsOnOff = Off;
    Header.VarSectionOnOff = Off;

    AnyVector GlenohumeralFlexion = ..BodyModel.Interface.Right.GlenohumeralFlexion.Pos;
    AnyVector GlenohumeralExternalRotation = ..BodyModel.Interface.Right.GlenohumeralExternalRotation.Pos;
    AnyVector GlenohumeralAbduction = ..BodyModel.Interface.Right.GlenohumeralAbduction.Pos;
    AnyVector ElbowFlexion = ..BodyModel.Interface.Right.ElbowFlexion.Pos;
    AnyVector ElbowPronation = ..BodyModel.Interface.Right.ElbowPronation.Pos;
    AnyVector WristFlexion = ..BodyModel.Interface.Right.WristFlexion.Pos;
    AnyVector WristAbduction = ..BodyModel.Interface.Right.WristAbduction.Pos;
  };
  #endif


}; //JointAngleOutputs
